// SBML level 3 version 1

model wolf2001()
  // model units - substance: substance

  // Compartments:
  compartment external = 1;
  compartment cytosol = 1;
  compartment mitochondria = 1;

  // Species:
  species $sul_ex in external = 0; sul_ex is "SO4_ex";
  species $eth_ex in external = 0; eth_ex is "EtOH_ex";
  species $oxy_ex in external = 0; oxy_ex is "O2_ex";
  species oxy in mitochondria = 7; oxy is "O2";  // substance in mole
  species $H2O in mitochondria = 0;
  species A3c in cytosol = 1.5; A3c is "ATP";  // substance in mole
  species aps in cytosol = 0.5; aps is "APS";  // substance in mole
  species $PPi in cytosol = 0;
  species pap in cytosol = 0.4; pap is "PAPS";  // substance in mole
  species sul in cytosol = 0.4; sul is "SO4";  // substance in mole
  species eth in cytosol = 4; eth is "EtOH";  // substance in mole
  species $A2c in cytosol; A2c is "ADP";  // substance in mole
  species hyd in cytosol = 0.5; hyd is "H2S";  // substance in mole
  species cys in cytosol = 0.3; cys is "CYS";  // substance in mole
  species N2 in cytosol = 2; N2 is "NADH";  // substance in mole
  species $N1 in cytosol; N1 is "NAD";  // substance in mole
  species aco in cytosol = 0.3; aco is "AcCoA";  // substance in mole
  species oah in cytosol = 1.5; oah is "OAH";  // substance in mole
  species S1 in mitochondria = 1.5;  // substance in mole
  species $S2 in mitochondria;  // substance in mole
  species $C1 in mitochondria = 0;
  species $C2 in mitochondria = 0;
  species $A2m in mitochondria; A2m is "ADP_mit";  // substance in mole
  species A3m in mitochondria = 1.5; A3m is "ATP_mit";  // substance in mole
  species $Ho in cytosol = 0;
  species $Hm in mitochondria = 0;

  // Parameters:
  Ac = 2;
  N = 2;
  S = 2;
  Am = 2;
  k_v0 = 1.6;
  Kc = 0.1;
  n = 4;
  k_v13 = 4;
  k2 = 0.2;
  k_v10 = 80;
  k14 = 10;
  k3 = 0.2;
  k4 = 0.2;
  k5 = 0.1;
  k6 = 0.12;
  k7 = 10;
  k15 = 5;
  k17 = 0.02;
  k18 = 1;
  k8 = 10;
  k9 = 10;
  k11 = 10;
  a = 0.1;
  Kh = 0.5;
  m = 4;
  k16 = 10;
  Ka = 1;
  k12 = 5;

  // Assignment rules:
  A2c := Ac - A3c;
  N1 := N - N2;
  S2 := S - S1;
  A2m := Am - A3m;

  // Reactions:
  v1: $sul_ex => sul; external*k_v0/(1 + (cys/Kc)^n);  // modifiers: cys
  v13: $eth_ex => eth; external*k_v13;
  v2: sul + A3c => aps + $PPi; cytosol*k2*sul*A3c;
  v10: $oxy_ex => oxy; external*k_v10;
  v14: oxy => $oxy_ex; mitochondria*k14*oxy;
  v3: aps + A3c => pap + $A2c; cytosol*k3*aps*A3c;
  v4: pap + 3 N2 => hyd + 3 $N1; cytosol*k4*pap*N2;
  v5: hyd + oah => cys; cytosol*k5*hyd*oah;
  v6: cys => ; cytosol*k6*cys;
  v7: eth + 2 $N1 => aco + 2 N2; cytosol*k7*eth*N1;
  v15: aco => oah; cytosol*k15*aco;
  v17: hyd => ; cytosol*k17*hyd;
  v18: oah => ; cytosol*k18*oah;
  v8: $S2 + aco => S1; mitochondria*k8*aco*S2;
  v9: S1 + 4 $N1 => $S2 + 4 N2; mitochondria*k9*S1*N1;
  v11a: $C1 + $Hm + N2 => $C2 + $Ho + $N1; mitochondria*k11*N2*oxy/((a*N2 + oxy)*(1 + (hyd/Kh)^m)); v11a is "vET1";  // modifiers: oxy, hyd
  v11a2: $C2 + oxy => $C1 + $H2O; mitochondria*k11*N2*oxy/((a*N2 + oxy)*(1 + (hyd/Kh)^m)); v11a2 is "vET2";  // modifiers: hyd, N2
  v16: $A2c + A3m => $A2m + A3c; mitochondria*k16*A3m*A2c;
  v11b: $Ho + $A2m => $Hm + A3m; mitochondria*3*k11*N2*oxy/((a*N2 + oxy)*(1 + (hyd/Kh)^m))*A2m/(Ka + A2m); v11b is "vSYNT";  // modifiers: oxy, hyd, N2
  vLEAK: $Ho => $Hm; 0;
  v12: A3c => $A2c; cytosol*k12*A3c;

  // Unit definitions:
  unit substance_per_volume = mole / litre;
  unit substance = mole;
end
